mN := N*10^-3
m(i) := {
    if i == 1
        30
    else if i == 2
        (30 + 60)/2 + 2000/0.02
    else if i == 3
        60
    else if i == 4
        40
    else if i == 5
        30
    else if i == 6
        3500
    else if i == 7
        50
    else if i == 8
        35
    else if i == 9
        2500
    else if i == 10
        (2500 + 50)/2 + 2000/0.02
    else if i == 11
        50
}*kg/m
EJ(i) := {
    if i == 1
        40
    else if i == 2
        (40 + 90)/2
    else if i == 3
        90
    else if i == 4
        60
    else if i == 5
        44
    else if i == 6
        44
    else if i == 7
        60
    else if i == 8
        55
    else if i == 9
        55
    else if i == 10
        (55 + 60)/2 + 3000
    else if i == 11
        60
}*mN*m^2
